// COMSOL Multiphysics 5.4.0.225 model "Untitled.mph"
// Outline of the model tree

Parameters
  T_amorph = 873[k]
  Vin = 1.75[V]

Functions
  rect1: Rectangle
  int1: Interpolation "reset" | funcname = reset; table = {{0, 0}, {1, 1.75}, {10, 1.75}, {11, 0}, {19, 0}, {45, 1.75}, {95, 1.75}, {120, 0}, {129, 0}, {130, 1.75}, {139, 1.75}, {140, 0}}
  int2: Interpolation "Drain_pulse" | funcname = Drain_V; table = {{0, 0}, {2.5, 0}, {3, 0.1}, {8, 0.1}, {8.5, 0}, {49, 0}, {50, Vin}, {90, Vin}, {91, 0}, {130, 0}, {132.5, 0}, {133, 0.1}, {138, 0.1}, {138.5, 0}, {40, 0}}

Geometry
  geom1 "Geometry 1" (2D axisymmetric, length unit nm)
    r1: Rectangle "Silicon" | size = {85, 50}
    r2: Rectangle "TiN" | pos = {0, 50}; size = {5, 99}
    r3: Rectangle "Electrode(TiN)" | pos = {0, 250}; size = {85, 40}
    pol1: Polygon "SiO2" | x = {85, 5, 5, 85, 85}; y = {50, 50, 150, 150, 50}
    pol2: Polygon "GST" | table = {, }; x = 85; y = 150
    fin: Finalize "Form Union"

Materials
  mat1: Common "Silicon" on domains 1
    def "Basic"
      thermalconductivity = 150
      density = 2330
      heatcapacity = 711
      electricconductivity = 1000
      relpermittivity = 11.68
      seebeckcoefficient = 0.5

Physics
  ht: HeatTransfer "Heat Transfer in Solids" on all domains
    dependent variable T
    solid1: SolidHeatTransferModel "Solid 1" (default)
    init1: init "Initial Values 1" (default)
    axi1: AxialSymmetry (default)
    ins1: ThermalInsulation (default)
  ec: ConductiveMedia "Electric Currents" on all domains
    dependent variable V
    cucn1: CurrentConservation (default)
    axi1: AxialSymmetry (default)
    ein1: ElectricInsulation (default)
    init1: init "Initial Values 1" (default)
  cir: Circuit "Electrical Circuit"
    dependent variable voltages
    gnd1: GroundNode
  dode: DomainODE "Domain ODEs and DAEs" on all domains
    dependent variable u
    dode1: DistributedODE (default) | f = 1; da = 1
    init1: init "Initial Values 1" (default)

Multiphysics
  tee1: ThermoelectricEffect | Heat_physics = ht; EMCurrentDensity_physics = ec
  emh1: ElectromagneticHeating | EMHeat_physics = ec; Heat_physics = ht

Mesh
  mesh1 "Mesh 1" (physics-controlled)

Studies
  std1 "Study 1"
    time: Transient "Time Dependent" | tlist = range(0,0.1,1)